// SBML level 3 version 1

function Constant_flux__irreversible(v)
  v;
end
Constant_flux__irreversible is "Constant flux (irreversible)";

function rDeCy(kDeCy, kDeCyCy, Skp2, Cy, substrate)
  (kDeCy + kDeCyCy*Skp2*Cy)*substrate;
end

function rDeP21(kDeP21, kDeP21Cy, Skp2, Cy, kDeP21aRc, Cdt2, aRc, p21)
  (kDeP21 + kDeP21Cy*Skp2*Cy + kDeP21aRc*Cdt2*aRc)*p21;
end

function rDsRc(Dna, Rc)
  piecewise(0, Dna < 1, piecewise(1*Rc, Dna > 1, 0.5*Rc));
end

function rReDam(kReDam, kReDamP53, P53, jDam, Dam)
  (kReDam + kReDamP53*P53/(jDam + Dam))*Dam;
end

function rPhRc(kPhRc, Cy, n, jCy, Rc)
  kPhRc*Cy^n/(jCy^n + Cy^n)*Rc;
end

function rDeP53(kDeP53, jP53, Dam, p53)
  kDeP53/(jP53 + Dam)*p53;
end

model Barr_2017___Dynamics_of_p21_in_hTert_RPE1_cells()
  // Barr 2017 - Dynamics of p21 in hTert-RPE1 cells
  // This model is described in the article:
  // DNA damage during S-phase mediates the proliferation quiescence decision in the subsequent G1 via p21 expression
  // Alexis R. Barr, Samuel Cooper, Frank S. Heldt, Francesca Butera, Henriette Stoy, Jörg Mansfeld, Bela Novak, Chris Bakal
  // Abstract:
  // Following DNA damage caused by exogenous sources, such as ionising radiation, the tumour suppressor p53 mediates cell cycle arrest via expression of the CDK inhibitor, p21. However, the role of p21 in maintaining genomic stability in the absence of exogenous DNA damaging agents is unclear. Here, using live single cell measurements of p21 protein in proliferating cultures, we show that naturally-occurring DNA damage incurred over S-phase causes p53-dependent accumulation of p21 during mother G2- and daughter G1-phases. High p21 levels mediate G1 arrest via CDK inhibition, yet lower levels have no impact on G1 progression, and the ubiquitin ligases CRL4^Cdt2 and SCF^Skp2 couple to degrade p21 prior to the G1/S transition. Mathematical modelling reveals that a bistable switch, created by CRL4^Cdt2, promotes irreversible S-phase entry by keeping p21 levels low, preventing premature S-phase exit upon DNA damage. Thus, we characterise how p21 regulates the proliferation-quiescence decision to maintain genomic stability.
  // model units - substance: substance, time: time, volume: volume, area: area, length: length, extent: substance

  // Compartments:
  compartment Cell = 1 volume;

  // Species:
  // (AU) mRNAs encoding for p21
  species MrnaP21 in Cell = 1;
  // (AU) mRNAs encoding for cyclins
  species MrnaCy in Cell = 1;
  // (AU) mRNAs encoding for p53
  species MrnaP53 in Cell = 1;
  // (AU) free p21
  species P21 in Cell = 0.72;
  // (AU) active CDK2:Cyclin complexes
  species Cy in Cell = 0;
  // (AU) CDK2:Cyclin:p21 complexes
  species CyP21 in Cell = 0;
  // (AU) free PCNA in the nucleus
  species aPcna in Cell = 0.5;
  // (AU) pre-replication complexes
  species Rc in Cell = 1;
  // (AU) primed/phosphorylated replication complexes
  species pRc in Cell = 0;
  // (AU) active replication complexes
  species aRc in Cell = 0;
  // (AU) inactive replication complexes
  species iRc in Cell = 0;
  // (AU) DNA
  species Dna in Cell = 0;
  // (AU) DNA damage
  species Dam in Cell = 0;
  // (AU) free p53
  species P53 in Cell = 0;
  // (AU) relative level of SCF^Skp2
  species $Skp2 in Cell = 1;
  // (AU) relative level of CRL4^Cdt2
  species $Cdt2 in Cell = 1;
  // (AU) PCNA:p21 complexes in the nucleus
  species iPcna in Cell = 0;
  // (AU) total level of p21
  species $tP21 in Cell;
  // (AU) total level of CDK2:Cyclin
  species $tCy in Cell;
  // (AU) total level of PCNA
  species $tPcna in Cell;

  // Parameters:
  // (AU/min) constitutive mRNA synthesis
  kSyMrna = 0.02;
  // (1/min) p53-dependent synthesis of p21 mRNAs
  kSyMrnaP53 = 0.08;
  // (1/min) mRNA degradation
  kDeMrna = 0.02;
  // (1/min) constitutive p21 synthesis
  kSyP21 = 0.0018;
  // (1/min) constitutive p21 degradation
  kDeP21 = 0.0025;
  // (1/(AU*min)) Cyclin:CDK2-mediated p21 degradation (Skp2-dependent)
  kDeP21Cy = 0.007;
  // (1/(AU*min)) aRC-mediated p21 degradation (Cdt2-dependent)
  kDeP21aRc = 1;
  // (1/min) cyclin synthesis
  kSyCy = 0.005;
  // (1/(AU*min)) association of Cyclin:CDK2 and p21
  kAsCyP21 = 1;
  // (1/min) dissociation of Cyclin:CDK2:p21 complexes
  kDsCyP21 = 0.05;
  // (1/min) constitutive cyclin degradation
  kDeCy = 0.002;
  // (1/(AU*min)) Cyclin:CDK2-mediated cyclin degradation (Skp2-dependent)
  kDeCyCy = 0.0002;
  // (AU/min) PCNA import into the nucleus
  kImPc = 0.003;
  // (1/min) PCNA export from the nucleus
  kExPc = 0.006;
  // (1/min) Cyclin:CDK2-mediated phosphorylation/priming of RCs
  kPhRc = 0.1;
  // (1/min) dephosphorylation of pRCs
  kDpRc = 0.01;
  // (AU) CDK2 threshold for the phosphorylation/priming of RCs
  jCy = 1.8;
  // (-) hill coefficient for the phosphorylation/priming of RCs
  n = 6;
  // (1/(AU*min)) association of phosphorylated/primed RCs and PCNA
  kAsRcPc = 0.01;
  // (1/min) dissociation of pRC:PCNA complexes
  kDsRcPc = 0.001;
  // (1/(AU*min)) association of PCNA and p21
  kAsPcP21 = 100;
  // (1/min) dissociation of PCNA:p21 complexes
  kDsPcP21 = 0.01;
  // (1/min) DNA synthesis by active RCs
  kSyDna = 0.007;
  // (1/min) constitutive p53 synthesis
  kSyP53 = 0.05;
  // (AU/min) DNA damage-dependent degradation of p53
  kDeP53 = 0.05;
  // (AU) inhibition constant of p53 degradation by DNA damage
  jP53 = 0.01;
  // (AU/min) replication-independent DNA damage
  kGeDam = 0.001;
  // (1/min) replication-dependent DNA damage
  kGeDamArc = 0.005;
  // (1/min) p53-independent DNA damage repair
  kReDam = 0.001;
  // (1/min) p53-dependent DNA damage repair
  kReDamP53 = 0.005;
  // (AU) DNA damage threshold for repair
  jDam = 0.5;

  // Assignment rules:
  tP21 := P21 + CyP21 + iPcna + iRc;
  tCy := Cy + CyP21;
  tPcna := aPcna + iPcna + aRc + iRc;

  // Reactions:
  Synthesis_of_p21_mRNAs: => MrnaP21; Cell*Constant_flux__irreversible(kSyMrna);
  Synthesis_of_p21_mRNAs_by_p53: P53 => MrnaP21 + P53; Cell*kSyMrnaP53*P53;
  Synthesis_of_cyclin_mRNAs: => MrnaCy; Cell*Constant_flux__irreversible(kSyMrna);
  Synthesis_of_p53_mRNAs: => MrnaP53; Cell*Constant_flux__irreversible(kSyMrna);
  Degradation_of_p21_mRNAs: MrnaP21 => ; Cell*kDeMrna*MrnaP21;
  Degradation_of_cyclin_mRNAs: MrnaCy => ; Cell*kDeMrna*MrnaCy;
  Degradation_of_p53_mRNAs: MrnaP53 => ; Cell*kDeMrna*MrnaP53;
  Synthesis_of_p21: MrnaP21 => MrnaP21 + P21; Cell*kSyP21*MrnaP21;
  Degradation_of_p21: P21 => ; Cell*rDeP21(kDeP21, kDeP21Cy, Skp2, Cy, kDeP21aRc, Cdt2, aRc, P21);  // modifiers: Skp2, Cy, Cdt2, aRc
  Synthesis_of_cyclins: MrnaCy => MrnaCy + Cy; Cell*kSyCy*MrnaCy;
  Degradation_of_cyclins: Cy => ; Cell*rDeCy(kDeCy, kDeCyCy, Skp2, Cy, Cy);  // modifiers: Skp2
  Association_and_dissociation_of_CDK2_Cyclin_and_p21: Cy + P21 -> CyP21; Cell*(kAsCyP21*Cy*P21 - kDsCyP21*CyP21); Association_and_dissociation_of_CDK2_Cyclin_and_p21 is "Association and dissociation of CDK2:Cyclin and p21";
  Degradation_of_cyclin_in_CDK2_Cyclin_p21_complexes: CyP21 => P21; Cell*rDeCy(kDeCy, kDeCyCy, Skp2, Cy, CyP21); Degradation_of_cyclin_in_CDK2_Cyclin_p21_complexes is "Degradation of cyclin in CDK2:Cyclin:p21 complexes";  // modifiers: Skp2, Cy
  Degradation_of_p21_in_CDK2_Cyclin_p21_complexes: CyP21 => Cy; Cell*rDeP21(kDeP21, kDeP21Cy, Skp2, Cy, kDeP21aRc, Cdt2, aRc, CyP21); Degradation_of_p21_in_CDK2_Cyclin_p21_complexes is "Degradation of p21 in CDK2:Cyclin:p21 complexes";  // modifiers: Skp2, Cdt2, aRc
  Import_of_active_PCNA: => aPcna; Cell*Constant_flux__irreversible(kImPc);
  Export_of_active_PCNA: aPcna => ; Cell*kExPc*aPcna;
  Export_of_inactive_PCNA: iPcna => P21; Cell*kExPc*iPcna;
  Association_and_dissociation_of_PCNA_and_p21: aPcna + P21 -> iPcna; Cell*(kAsPcP21*aPcna*P21 - kDsPcP21*iPcna);
  Degradation_of_p21_in_PCNA_p21_complexes: iPcna => aPcna; Cell*rDeP21(kDeP21, kDeP21Cy, Skp2, Cy, kDeP21aRc, Cdt2, aRc, iPcna); Degradation_of_p21_in_PCNA_p21_complexes is "Degradation of p21 in PCNA:p21 complexes";  // modifiers: Skp2, Cy, Cdt2, aRc
  Phosphorylation_priming_of_replication_complexes: Rc => pRc; Cell*rPhRc(kPhRc, Cy, n, jCy, Rc); Phosphorylation_priming_of_replication_complexes is "Phosphorylation/priming of replication complexes";  // modifiers: Cy
  Dephosphorylation_of_replication_complexes: pRc => Rc; Cell*kDpRc*pRc;
  Association_and_dissociation_of_active_PCNA_and_replication_complexes: aPcna + pRc -> aRc; Cell*(kAsRcPc*aPcna*pRc - kDsRcPc*aRc);
  Association_and_dissociation_of_inactive_PCNA_and_replication_complexes: iPcna + pRc -> iRc; Cell*(kAsRcPc*iPcna*pRc - kDsRcPc*iRc);
  Association_and_dissociation_of_p21_and_replication_complexes: aRc + P21 -> iRc; Cell*(kAsPcP21*aRc*P21 - kDsPcP21*iRc);
  Degradation_of_p21_in_inactive_replication_complexes: iRc => aRc; Cell*rDeP21(kDeP21, kDeP21Cy, Skp2, Cy, kDeP21aRc, Cdt2, aRc, iRc);  // modifiers: Skp2, Cy, Cdt2
  Synthesis_of_DNA: aRc => aRc + Dna; Cell*kSyDna*aRc;
  Dissassembly_of_RC: Rc => ; Cell*rDsRc(Dna, Rc);  // modifiers: Dna
  Dissassembly_of_pRC: pRc => ; Cell*rDsRc(Dna, pRc);  // modifiers: Dna
  Dissassembly_of_aRC: aRc => aPcna; Cell*rDsRc(Dna, aRc);  // modifiers: Dna
  Dissassembly_of_iRC: iRc => iPcna; Cell*rDsRc(Dna, iRc);  // modifiers: Dna
  Synthesis_of_p53: MrnaP53 => MrnaP53 + P53; Cell*kSyP53*MrnaP53;
  Degradation_of_p53: P53 => ; Cell*rDeP53(kDeP53, jP53, Dam, P53);  // modifiers: Dam
  Induction_of_DNA_damage: => Dam; Cell*Constant_flux__irreversible(kGeDam);
  Induction_of_DNA_damage_by_replication: aRc => aRc + Dam; Cell*kGeDamArc*aRc;
  Repair_of_DNA_damage: Dam => ; Cell*rReDam(kReDam, kReDamP53, P53, jDam, Dam);  // modifiers: P53

  // Unit definitions:
  unit length = metre;
  unit area = metre^2;
  unit volume = dimensionless;
  unit time = 60 second;
  unit substance = dimensionless;
end
